// COMSOL Multiphysics 6.2.0.339 model "optimized_trap_llm_best.mph"
// Outline of the model tree

Parameters
  Rp = 10[um]
  XS1 = -2*25[um]
  XS2 = -2*50[um]
  Vin = 0.001[m/s]
  delta = 4[um]

Functions
  rm1: Ramp | location = 2.5e5; slope = 5e-5; smoothzoneloc = 100; smoothzonecutoff = 100; cutoff = 1

Variables
  var1 "Variables 1"
    Gtot = G2+G3
    Mu = 1e-3[Pa*s]+0*rm1(Gtot*1[m])*1[Pa*s]
    Pw = 1e3[Pa]
    dw = 1/Gtot
    dc = 2[um]
    epsi = 1[um]
    P0 = 1[Pa]
    d1W = wd.Dw
    d2W = d1W
    d3W = d1W
    d12 = wd3.Dw
    d13 = wd4.Dw
    d23 = d13
    d21 = wd2.Dw
    d31 = d21
    d32 = d12
    d4W = d1W
    d5W = d1W
    d6W = d1W
    d7W = d1W
    d8W = d1W
    d9W = d1W
    d10W = d1W
    d14 = wd5.Dw
    d15 = wd6.Dw
    d16 = wd7.Dw
    d17 = wd8.Dw
    d18 = wd9.Dw
    d19 = wd10.Dw
    d110 = wd11.Dw
    d24 = d14
    d25 = d15
    d26 = d16
    d27 = d17
    d28 = d18
    d29 = d19
    d210 = d110
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  var2 "P1" (disabled) on boundaries 173, 174, 183, 184
    d1W = sqrt((x-W_b(x))^2+(y-W_b(y))^2)
    d12 = sqrt((x-P_2(x))^2+(y-P_2(y))^2)
    d13 = sqrt((x-P_3(x))^2+(y-P_3(y))^2)
  var3 "P2" (disabled) on boundaries 171, 172, 181, 182
    d2W = sqrt((x-W_b(x))^2+(y-W_b(y))^2)
    d21 = sqrt((x-P_1(x))^2+(y-P_1(y))^2)
    d23 = sqrt((x-P_3(x))^2+(y-P_3(y))^2)
  var4 "P3" (disabled) on boundaries 169, 170, 179, 180
    d3W = sqrt((x-W_b(x))^2+(y-W_b(y))^2)
    d31 = sqrt((x-P_1(x))^2+(y-P_1(y))^2)
    d32 = sqrt((x-P_2(x))^2+(y-P_2(y))^2)
  var5 "Variables 5"
    A1 = (X1>220[um] && X1<260[um])*(Y1>256[um] && Y1<288[um])+(X2>220[um] && X2<260[um])*(Y2>256[um] && Y2<288[um])+(X3>220[um] && X3<260[um])*(Y3>256[um] && Y3<288[um])+(X4>220[um] && X4<260[um])*(Y4>256[um] && Y4<288[um])+(X5>220[um] && X5<260[um])*(Y5>256[um] && Y5<288[um])+(X6>220[um] && X6<260[um])*(Y6>256[um] && Y6<288[um])+(X7>220[um] && X7<260[um])*(Y7>256[um] && Y7<288[um])+(X8>220[um] && X8<260[um])*(Y8>256[um] && Y8<288[um])+(X9>220[um] && X9<260[um])*(Y9>256[um] && Y9<288[um])+(X10>220[um] && X10<260[um])*(Y10>256[um] && Y10<288[um])
    A2 = (X1>200[um] && X1<260[um])*(Y1>210[um] && Y1<238[um])+(X2>200[um] && X2<260[um])*(Y2>210[um] && Y2<238[um])+(X3>200[um] && X3<260[um])*(Y3>210[um] && Y3<238[um])+(X4>200[um] && X4<260[um])*(Y4>210[um] && Y4<238[um])+(X5>200[um] && X5<260[um])*(Y5>210[um] && Y5<238[um])+(X6>200[um] && X6<260[um])*(Y6>210[um] && Y6<238[um])+(X7>200[um] && X7<260[um])*(Y7>210[um] && Y7<238[um])+(X8>200[um] && X8<260[um])*(Y8>210[um] && Y8<238[um])+(X9>200[um] && X9<260[um])*(Y9>210[um] && Y9<238[um])+(X10>200[um] && X10<260[um])*(Y10>210[um] && Y10<238[um])
    A3 = (X1>170[um] && X1<230[um])*(Y1>166[um] && Y1<194[um])+(X2>170[um] && X2<230[um])*(Y2>163[um] && Y2<194[um])+(X3>170[um] && X3<230[um])*(Y3>163[um] && Y3<194[um])+(X4>170[um] && X4<230[um])*(Y4>166[um] && Y4<194[um])+(X5>170[um] && X5<230[um])*(Y5>166[um] && Y5<194[um])+(X6>170[um] && X6<230[um])*(Y6>166[um] && Y6<194[um])+(X7>170[um] && X7<230[um])*(Y7>166[um] && Y7<194[um])+(X8>170[um] && X8<230[um])*(Y8>166[um] && Y8<194[um])+(X9>170[um] && X9<230[um])*(Y9>166[um] && Y9<194[um])+(X10>170[um] && X10<230[um])*(Y10>166[um] && Y10<194[um])
    A4 = (X1>146[um] && X1<200[um])*(Y1>122[um] && Y1<150[um])+(X2>146[um] && X2<200[um])*(Y2>122[um] && Y2<150[um])+(X3>146[um] && X3<200[um])*(Y3>122[um] && Y3<150[um])+(X4>146[um] && X4<200[um])*(Y4>122[um] && Y4<150[um])+(X5>146[um] && X5<200[um])*(Y5>122[um] && Y5<150[um])+(X6>146[um] && X6<200[um])*(Y6>122[um] && Y6<150[um])+(X7>146[um] && X7<200[um])*(Y7>122[um] && Y7<150[um])+(X8>146[um] && X8<200[um])*(Y8>122[um] && Y8<150[um])+(X9>146[um] && X9<200[um])*(Y9>122[um] && Y9<150[um])+(X10>146[um] && X10<200[um])*(Y10>122[um] && Y10<150[um])
    A5 = (X1>132[um] && X1<180[um])*(Y1>78[um] && Y1<106[um])+(X2>132[um] && X2<180[um])*(Y2>78[um] && Y2<106[um])+(X3>132[um] && X3<180[um])*(Y3>78[um] && Y3<106[um])+(X4>132[um] && X4<180[um])*(Y4>78[um] && Y4<106[um])+(X5>132[um] && X5<180[um])*(Y5>78[um] && Y5<106[um])+(X6>132[um] && X6<180[um])*(Y6>78[um] && Y6<106[um])+(X7>132[um] && X7<180[um])*(Y7>78[um] && Y7<106[um])+(X8>132[um] && X8<180[um])*(Y8>78[um] && Y8<106[um])+(X9>132[um] && X9<180[um])*(Y9>78[um] && Y9<106[um])+(X10>132[um] && X10<180[um])*(Y10>78[um] && Y10<106[um])
    A6 = (X1>290[um])+(X2>290[um])+(X3>290[um])+(X4>290[um])+(X5>290[um])+(X6>290[um])+(X7>290[um])+(X8>290[um])+(X9>290[um])+(X10>290[um])
    A7 = 10-A6-A1-A2-A3-A4-A5
    CTN = A1+10*A2+100*A3+1000*A4+10000*A5+100000*A7
    vlct_1 = aveop1(spf.U)  // average flow velocitie through the boundary
    vlct_2 = aveop2(spf.U)  // average flow velocitie through the boundary
    vlct_3 = aveop3(spf.U)  // average flow velocitie through the boundary
    vlct_4 = aveop4(spf.U)  // average flow velocitie through the boundary
    vlct_5 = aveop5(spf.U)  // average flow velocitie through the boundary
    vlct_side = aveop6(spf.U)  // average flow velocitie through the boundary
    vlct_main = aveop7(spf.U)  // average flow velocitie through the boundary
    curv = maxop1(abs(spf.U^2 * vx - v^2 * uy + spf.U*v*(vy - ux))/(u^2 + v^2)^1.5)  // curvature objective function term
    curl = maxop1(uy) + maxop1(vx)

Couplings
  genext1: GeneralExtrusion (disabled) on no boundaries | opname = W_b; dstmap = {x, y}; srcmap = {x, y}; method = closest
  genext2: GeneralExtrusion (disabled) on boundaries 173, 174, 183, 184
    opname = P_1
    dstmap = {x, y}
    srcmap = {x, y}
    method = closest
  genext3: GeneralExtrusion (disabled) on boundaries 171, 172, 181, 182
    opname = P_2
    dstmap = {x, y}
    srcmap = {x, y}
    method = closest
  genext4: GeneralExtrusion (disabled) on boundaries 169, 170, 179, 180
    opname = P_3
    dstmap = {x, y}
    srcmap = {x, y}
    method = closest
  aveop1: Average "Average vlct_1" on boundaries 133
  aveop2: Average "Average vlct_2" on boundaries 136
  aveop3: Average "Average vlct_3" on boundaries 122
  aveop4: Average "Average vlct_4" on boundaries 96
  aveop5: Average "Average vlct_5" on boundaries 78
  aveop6: Average "Average vlct_side" on boundaries 120
  aveop7: Average "Average vlct_main" on boundaries 86
  maxop1: Maximum on domains 1, 5

Probes
  dom1: Domain "Domain Probe 1" on domains 15
    probename = X1
    expr = x
    unit = µm
    descr = x-coordinate
    frame = spatial
    table = tbl1
  dom2: Domain "Domain Probe 2" on domains 15
    probename = Y1
    expr = y
    unit = µm
    descr = y-coordinate
    frame = spatial
    table = tbl1
  dom3: Domain "Domain Probe 3" on domains 14
    probename = X2
    expr = x
    unit = µm
    descr = x-coordinate
    frame = spatial
    table = tbl1
  dom4: Domain "Domain Probe 4" on domains 14
    probename = Y2
    expr = y
    unit = µm
    descr = y-coordinate
    frame = spatial
    table = tbl1
  dom5: Domain "Domain Probe 5" on domains 13
    probename = X3
    expr = x
    unit = µm
    descr = x-coordinate
    frame = spatial
    table = tbl1
  dom6: Domain "Domain Probe 6" on domains 13
    probename = Y3
    expr = y
    unit = µm
    descr = y-coordinate
    frame = spatial
    table = tbl1
  dom7: Domain "Domain Probe 7" on domains 12
    probename = X4
    expr = x
    unit = µm
    descr = x-coordinate
    frame = spatial
    table = tbl1
  dom8: Domain "Domain Probe 8" on domains 12
    probename = Y4
    expr = y
    unit = µm
    descr = y-coordinate
    frame = spatial
    table = tbl1
  dom9: Domain "Domain Probe 9" on domains 11
    probename = X5
    expr = x
    unit = µm
    descr = x-coordinate
    frame = spatial
    table = tbl1
  dom10: Domain "Domain Probe 10" on domains 11
    probename = Y5
    expr = y
    unit = µm
    descr = y-coordinate
    frame = spatial
    table = tbl1
  dom11: Domain "Domain Probe 11" on domains 10
    probename = X6
    expr = x
    unit = µm
    descr = x-coordinate
    frame = spatial
    table = tbl1
  dom12: Domain "Domain Probe 12" on domains 10
    probename = Y6
    expr = y
    unit = µm
    descr = y-coordinate
    frame = spatial
    table = tbl1
  dom13: Domain "Domain Probe 13" on domains 9
    probename = X7
    expr = x
    unit = µm
    descr = x-coordinate
    frame = spatial
    table = tbl1
  dom14: Domain "Domain Probe 14" on domains 9
    probename = Y7
    expr = y
    unit = µm
    descr = y-coordinate
    frame = spatial
    table = tbl1
  dom15: Domain "Domain Probe 15" on domains 8
    probename = X8
    expr = x
    unit = µm
    descr = x-coordinate
    frame = spatial
    table = tbl1
  dom16: Domain "Domain Probe 16" on domains 8
    probename = Y8
    expr = y
    unit = µm
    descr = y-coordinate
    frame = spatial
    table = tbl1
  dom17: Domain "Domain Probe 17" on domains 7
    probename = X9
    expr = x
    unit = µm
    descr = x-coordinate
    frame = spatial
    table = tbl1
  dom18: Domain "Domain Probe 18" on domains 7
    probename = Y9
    expr = y
    unit = µm
    descr = y-coordinate
    frame = spatial
    table = tbl1
  dom19: Domain "Domain Probe 19" on domains 6
    probename = X10
    expr = x
    unit = µm
    descr = x-coordinate
    frame = spatial
    table = tbl1
  dom20: Domain "Domain Probe 20" on domains 6
    probename = Y10
    expr = y
    unit = µm
    descr = y-coordinate
    frame = spatial
    table = tbl1

Pairs
  p1: Contact "Contact Pair 1" (disabled) | source: boundaries 173, 174, 183, 184

Geometry
  geom1 "Geometry 1" (2D, length unit µm)
    imp1: Import | type = dxf; filename = C:\Users\GG\Documents\000\Sim\Part Trac Kam\geom4.dxf
    sca1: Scale (disabled) | input = imp1; isotropic = 10; factor = 10
    c1: Circle | pos = {XS1, 132*2}; r = Rp
    imp2: Import (disabled) | type = dxf; filename = /home/kbehrouzi/geom1.dxf
    sca2: Scale (disabled) | input = imp2; isotropic = 10.5; factor = 10.5
    mov1: Move (disabled) | input = sca2; displx = -5; disply = -5
    dif1: Difference (disabled) | input = mov1; input2 = sca1; intbnd = off; edge = all
    r1: Rectangle (disabled) | pos = {-21.935, 100}; base = center; size = {10, 200}
    r2: Rectangle (disabled) | pos = {170, 100}; base = center; size = {10, 200}
    dif2: Difference (disabled) | input = dif1; input2 = r1, r2
    imp3: Import (disabled) | type = dxf; filename = /home/kbehrouzi/geom1.dxf
    sca3: Scale (disabled) | input = imp3; isotropic = 10; factor = 10
    del1: Delete "Delete Entities 1" | input = sca1(1) domains 2-9; imp1(1) domains 2-7
    c2: Circle | pos = {XS1, 114*2}; r = Rp
    c3: Circle | pos = {XS1, 96*2}; r = Rp
    r3: Rectangle (disabled) | pos = {164, 45.021}; size = {100, 100}
    r4: Rectangle (disabled) | pos = {-50-60, 45.021}; size = {100, 100.0}
    uni1: Union | input = del1, r3, r4; intbnd = off; edge = all
    c4: Circle | pos = {XS1, 78*2}; r = Rp
    c5: Circle | pos = {XS1, 60*2}; r = Rp
    c6: Circle | pos = {XS2, 132*2}; r = Rp
    c7: Circle | pos = {XS2, 114*2}; r = Rp
    c8: Circle | pos = {XS2, 96*2}; r = Rp
    c9: Circle | pos = {XS2, 78*2}; r = Rp
    c10: Circle | pos = {XS2, 60*2}; r = Rp
    sca4: Scale (disabled) | input = uni1; isotropic = 2; factor = 2
    edo1: EditObject (disabled) | checksum = {394465529, 1412976960}; input = sca4
    edo2: EditObject (disabled) | checksum = {728638615, 2053880840}; input = edo1
    edo3: EditObject (disabled) | checksum = {2065593883, 1769002899}; input = edo2
    edo4: EditObject (disabled) | checksum = {50234616, 384383632}; input = edo3
    ls1: LineSegment | vertex1 = uni1(1) points 41; vertex2 = uni1(1) points 43
    ls2: LineSegment | vertex1 = uni1(1) points 53; vertex2 = uni1(1) points 58
    ls3: LineSegment | vertex1 = uni1(1) points 57; vertex2 = uni1(1) points 56
    ls4: LineSegment | vertex1 = uni1(1) points 42; vertex2 = uni1(1) points 45
    ls5: LineSegment | vertex1 = uni1(1) points 25; vertex2 = uni1(1) points 24
    ls6: LineSegment | vertex1 = uni1(1) points 14; vertex2 = uni1(1) points 13
    ls7: LineSegment | vertex1 = uni1(1) points 18; vertex2 = uni1(1) points 26
    pol1: Polygon
      x = 15.0 15.0 15.0013358019 15.0079587292 15.0452168088 15.0783765652 47.2785849517 47.3108961388418 47.3536229697563 47.408457819 47.451796010531 134.203515628 134.244994242 134.292751024 134.250547703 134.213196322 65.591325475918 65.5509896444508 65.4987594012 65.4401221826 65.3935643924 15.1069200732 15.0614305462 15.0069825729 15.0011814704
      y = {29.8484508535, 65.9356454557, 65.9868249952, 66.0500460489, 66.1015494498, 66.140556631, 102.0752486568016, 102.109582888, 102.1487939044883, 102.129919975, 102.111355132, 62.4162798251, 62.3960257275, 62.3680707633, 62.332278726, 62.3051571793, 15.0628724353, 15.036543992, 15.0077122384, 15.018709735, 15.0310603785, 29.7058693334, 29.7203749824, 29.7423072330451, 29.800719155}
    pol2: Polygon
      x = {25.0753794162, 36.4509961788, 37.3035354894, 38.1012670057, 38.77931606, 39.2825410339, 39.5700176914, 39.6622489852, 40.062708675, 66.6876528449, 67.2100619260648, 67.4948365208, 67.5166301123, 65.6715308839, 116.453989049312, 58.9994564084, 59.995509744, 60.0147301703591, 59.8318559673, 59.4020599747, 58.7630826231, 57.9710325798, 57.0954598412, 56.2132485401, 55.2772478146, 25.0875775367}
      y = {259.984142342, 258.224361223, 258.295720568276, 258.6048157968334, 259.126510068, 259.8183771487317, 260.6241516852405, 261.4973786176001, 290.038831849, 308.2545172737898, 308.9812487348152, 309.82974935, 310.7244978647711, 318.8577512219153, 220.3882101613702, 216.946092504, 221.2057374839246, 221.8483473815019, 222.718317471, 223.4964989001848, 224.114559476, 224.5182272360554, 224.672056072, 224.5625382585569, 224.152437404, 259.879663179}
    pol3: Polygon
      x = {156.126604495, 156.164227682, 156.197031824, 209.658544867, 209.689203055, 209.7267398598343, 209.716778013, 209.705223696, 188.844543619, 188.828541433, 188.8045862676199, 188.7464661977073, 188.698555185, 160.625731931, 160.578111746, 160.5194535574065, 160.5009842962269, 160.489362436, 156.1426107975421, 156.133677579}
      y = {284.8203355042521, 284.862870241, 284.895053097, 334.9250367935813, 334.9523563150628, 334.981174157, 334.934911414, 334.895506104, 269.6825095208091, 269.636497337, 269.5813799867019, 269.5660884934176, 269.5572722689078, 265.1167586489189, 265.1104487289265, 265.1071418905415, 265.162914685, 265.209524014, 284.7189129936388, 284.7639912097007}
    fin: Finalize "Form Union"
    cle1: CollapseEdges (disabled) | input = fin 4, 5, 104, 105, 106

Materials
  mat1: Common "PDMS - Polydimethylsiloxane" on no domains
    def "Basic"
      thermalexpansioncoefficient = 9e-4[1/K]
      heatcapacity = 1460[J/(kg*K)]
      relpermittivity = 2.75
      density = 970[kg/m^3]
      thermalconductivity = 0.16[W/(m*K)]
    Enu "Young's modulus and Poisson's ratio"
      E = 750[kPa]
      nu = 0.49

Physics
  spf: LaminarFlow on domains 1, 5
    dependent variable u = {u, v, w}
    PhysicalModelProperty.Compressibility = Incompressible
    AdvancedSettingProperty.UsePseudoTime = 1
    fp1: FluidProperties (default) | rho_mat = userdef; rho = 1000[kg/m^3]; mu_mat = userdef; mu = Mu
    init1: init "Initial Values 1" (default)
    wallbc1: WallBC "Wall 1" (default)
    inl1: InletBoundary "Inlet 1" on boundaries 1 | BoundaryCondition = FullyDevelopedFlow; Uavfdf = Vin
    out1: OutletBoundary "Outlet 1" on boundaries 144

Mesh
  mesh1 "Mesh 1"
    size: MeshSizeDefault | hmax = 48.9; hmin = 0.219; hcurve = 0.3; hgrad = 1.3
    size1: Size on domains 1, 5 | table = cfd; hmax = 23.5; hmin = 1.05; hcurve = 0.4; hgrad = 1.2; hauto = 6
    size2: Size on all boundaries | hauto = 4
    cr1: CornerRefinement on domains 1, 5 | boundary = boundaries 1-7, 99, 124, 142-144, 173, 174, 183, 184
    ftri1: FreeTri "Free Triangular 1" on domains 1, 5-15
    bl1: BndLayer "Boundary Layers 1" (disabled) on domains 1, 5
      sharpcorners = trim
      smoothmaxiter = 4
      smoothmaxdepth = 6
      method = legacy60
      blp1: BndLayerProp "Boundary Layer Properties 1" on boundaries 173, 174, 183, 184
        blnlayers = 2
        blhminfact = 5
        blhmin = 1.22
        blhtot = 2.684

Studies
  std1 "Study 1"
    stat: Stationary

Solver configurations
  sol1 "Solution 1" (study std1)
    v1: Variables "Dependent Variables 1"
    s1: Stationary "Stationary Solver 1"
      fc1: FullyCoupled | linsolver = d1; initstep = 0.01; maxiter = 100
      d1: Direct "Direct, fluid flow variables (spf)" | linsolver = pardiso; pivotperturb = 1.0E-13

Datasets
  rm1_ds1: Grid1D
  rm1_ds2: Grid1D
  rm1_ds3: Grid1D
  rm1_ds4: Grid1D
  dset1: Solution | solution = sol1
  dset2: Solution "Probe Solution 2" | solution = sol1
  avh1: Average "Domain Probe 1" on domains 12 | data = dset2
  avh2: Average "Domain Probe 2" on domains 12 | data = dset2
  avh3: Average "Domain Probe 3" on domains 11 | data = dset2
  avh4: Average "Domain Probe 4" on domains 11 | data = dset2
  avh5: Average "Domain Probe 5" on domains 10 | data = dset2
  avh6: Average "Domain Probe 6" on domains 10 | data = dset2
  avh7: Average "Domain Probe 7" on domains 9 | data = dset2
  avh8: Average "Domain Probe 8" on domains 9 | data = dset2
  avh9: Average "Domain Probe 9" on domains 8 | data = dset2
  avh10: Average "Domain Probe 10" on domains 8 | data = dset2
  avh11: Average "Domain Probe 11" on domains 7 | data = dset2
  avh12: Average "Domain Probe 12" on domains 7 | data = dset2
  avh13: Average "Domain Probe 13" on domains 6 | data = dset2
  avh14: Average "Domain Probe 14" on domains 6 | data = dset2
  avh15: Average "Domain Probe 15" on domains 5 | data = dset2
  avh16: Average "Domain Probe 16" on domains 5 | data = dset2
  avh17: Average "Domain Probe 17" on domains 4 | data = dset2
  avh18: Average "Domain Probe 18" on domains 4 | data = dset2
  avh19: Average "Domain Probe 19" on domains 3 | data = dset2
  avh20: Average "Domain Probe 20" on domains 3 | data = dset2

Derived values
  pev1: EvalPoint "Domain Probe 1" | data = avh1; table = tbl1; expr = x
  pev2: EvalPoint "Domain Probe 2" | data = avh2; table = tbl1; expr = y
  pev3: EvalPoint "Domain Probe 3" | data = avh3; table = tbl1; expr = x
  pev4: EvalPoint "Domain Probe 4" | data = avh4; table = tbl1; expr = y
  pev5: EvalPoint "Domain Probe 5" | data = avh5; table = tbl1; expr = x
  pev6: EvalPoint "Domain Probe 6" | data = avh6; table = tbl1; expr = y
  pev7: EvalPoint "Domain Probe 7" | data = avh7; table = tbl1; expr = x
  pev8: EvalPoint "Domain Probe 8" | data = avh8; table = tbl1; expr = y
  pev9: EvalPoint "Domain Probe 9" | data = avh9; table = tbl1; expr = x
  pev10: EvalPoint "Domain Probe 10" | data = avh10; table = tbl1; expr = y
  pev11: EvalPoint "Domain Probe 11" | data = avh11; table = tbl1; expr = x
  pev12: EvalPoint "Domain Probe 12" | data = avh12; table = tbl1; expr = y
  pev13: EvalPoint "Domain Probe 13" | data = avh13; table = tbl1; expr = x
  pev14: EvalPoint "Domain Probe 14" | data = avh14; table = tbl1; expr = y
  pev15: EvalPoint "Domain Probe 15" | data = avh15; table = tbl1; expr = x
  pev16: EvalPoint "Domain Probe 16" | data = avh16; table = tbl1; expr = y
  pev17: EvalPoint "Domain Probe 17" | data = avh17; table = tbl1; expr = x
  pev18: EvalPoint "Domain Probe 18" | data = avh18; table = tbl1; expr = y
  pev19: EvalPoint "Domain Probe 19" | data = avh19; table = tbl1; expr = x
  pev20: EvalPoint "Domain Probe 20" | data = avh20; table = tbl1; expr = y

Tables
  tbl1: Table "Probe Table 1"
    x-coordinate (µm), Domain Probe 1 | y-coordinate (µm), Domain Probe 2 | x-coordinate (µm), Domain Probe 3 | y-coordinate (µm), Domain Probe 4 | x-coordinate (µm), Domain Probe 5 | y-coordinate (µm), Domain Probe 6 | x-coordinate (µm), Domain Probe 7 | y-coordinate (µm), Domain Probe 8 | x-coordinate (µm), Domain Probe 9 | y-coordinate (µm), Domain Probe 10 | x-coordinate (µm), Domain Probe 11 | y-coordinate (µm), Domain Probe 12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
    -50 | 264 | -50 | 228 | -50 | 192 | -50 | 156 | -50 | 120 | -100 | 264
  tbl2: Table
    // Global Evaluation 1
    Time (s) | CTN
    0.04 | 300000

Plots
  pg9: PlotGroup1D "Probe Plot Group 9"
    tblp1: Table "Probe Table Graph 1" | table = tbl1
  pg10: PlotGroup2D "Velocity (spf)" | data = dset1
    surf1: Surface | expr = spf.U
  pg11: PlotGroup2D "Pressure (spf)" | data = dset1
    con1: Contour | expr = p; levelrounding = off